// SBML level 3 version 2

model biocrnpyler_714851()
  // model units - substance: mole, time: second, volume: litre, area: square_metre, length: metre, extent: mole

  // Compartments:
  compartment default = 1e-6;

  // Species:
  species cephaloridine_periplasm in default = 0;
  species cephaloridine_environment in default = 0.1239;
  species tetracycline_periplasm in default = 0;
  species tetracycline_environment in default = 0.1239;
  species cephaloridine_hydrolyzed in default = 0;
  species AcrAB in default = 0.0004525;
  species beta_lactamase in default = 0.000525;

  // Parameters:
  ceph_export_kcat__ = 0.09560901;
  ceph_export_km__ = 0.288;
  tet_export_kcat__ = 0.0001575973;
  tet_export_km__ = 0.2;
  tet_hydrolysis_kcat__ = 130;
  tet_hydrolysis_km__ = 170;

  // Reactions:
  r0: cephaloridine_periplasm => cephaloridine_environment; ceph_export_kcat__*AcrAB*cephaloridine_periplasm^r0_n/(ceph_export_km__^r0_n + cephaloridine_periplasm^r0_n);  // modifiers: AcrAB
    r0_n = 1.75;
  r1: tetracycline_periplasm => tetracycline_environment; tet_export_kcat__*AcrAB*tetracycline_periplasm^r1_n/(tet_export_km__^r1_n + tetracycline_periplasm^r1_n);  // modifiers: AcrAB
    r1_n = 1;
  r2: cephaloridine_periplasm => cephaloridine_hydrolyzed; tet_hydrolysis_kcat__*beta_lactamase*cephaloridine_periplasm^r2_n/(tet_hydrolysis_km__^r2_n + cephaloridine_periplasm^r2_n);  // modifiers: beta_lactamase
    r2_n = 1;
  r3: cephaloridine_environment => cephaloridine_periplasm; r3_x_am*cephaloridine_permeability*(cephaloridine_environment - cephaloridine_periplasm)*r3_mass/r3_volume;
    r3_x_am = 132; cephaloridine_permeability = 0.000571; r3_mass = 1.17e-9; r3_volume = 2.4e-13;
  r4: tetracycline_environment => tetracycline_periplasm; r4_x_am*tetracycline_permeability*(tetracycline_environment - tetracycline_periplasm)*r4_mass/r4_volume;
    r4_x_am = 132; tetracycline_permeability = 1e-5; r4_mass = 1.17e-9; r4_volume = 2.4e-13;

  // Unit definitions:
  unit square_metre = metre^2;
end
