// SBML level 3 version 2

model biocrnpyler_851240()
  // model units - substance: mole, time: second, volume: litre, area: square_metre, length: metre, extent: mole

  // Compartments:
  compartment default = 1e-6;

  // Species:
  species nitrocefin_in in default = 0;
  species nitrocefin_out in default = 0.1239;
  species nitrocefin_hydrolyzed in default = 0;
  species pump in default = 0.0004525;
  species beta_lactamase in default = 0.000525;

  // Parameters:
  export_kcat__ = 10;
  export_km__ = 0.00495;
  hydrolysis_kcat__ = 490;
  hydrolysis_km__ = 0.5;

  // Reactions:
  r0: nitrocefin_in => nitrocefin_out; export_kcat__*pump*nitrocefin_in^r0_n/(export_km__^r0_n + nitrocefin_in^r0_n);  // modifiers: pump
    r0_n = 1;
  r1: nitrocefin_in => nitrocefin_hydrolyzed; hydrolysis_kcat__*beta_lactamase*nitrocefin_in^r1_n/(hydrolysis_km__^r1_n + nitrocefin_in^r1_n);  // modifiers: beta_lactamase
    r1_n = 1;
  r2: nitrocefin_out => nitrocefin_in; x_am*perm*(nitrocefin_out - nitrocefin_in)*mass/volume;
    x_am = 132; perm = 2e-7; mass = 1.17e-9; volume = 3.2e-13;

  // Unit definitions:
  unit square_metre = metre^2;
end
