// SBML level 3 version 2

model biocrnpyler_507554()
  // model units - substance: mole, time: second, volume: litre, area: square_metre, length: metre, extent: mole

  // Compartments:
  compartment default = 1e-6;

  // Species:
  species tetracycline_cytoplasm in default = 0;
  species tetracycline_periplasm in default = 0.1239;

  // Reactions:
  r0: tetracycline_periplasm => tetracycline_cytoplasm; x_am*perm*(tetracycline_periplasm - tetracycline_cytoplasm)*mass/volume;
    x_am = 165; perm = 3e-6; mass = 1.17e-9; volume = 1.44e-24;

  // Unit definitions:
  unit square_metre = metre^2;
end
